a_tr := 0, 0.00001 .. 0.005
B_tr := 0.0125
h_tr := 0.002
b_tr(a_tr) :=
    a_tr/2 if (a_tr/2) < h_tr
    h_tr if a_tr/2 ≥ h_tr
f_B(a_tr) := sqrt(1/cos((π*a_tr)/B_tr*sqrt(b_tr(a_tr)/h_tr)))
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# Кажется, что с функцией f_B(a_tr) все в порядке и она не должна выдавать NaN
